!------------------------------------------------------------------------------
!--------------------Typical Circuit plots    -----------------
!------------------------------------------------------------------------------
! Labels and Dots are on
set markTransformers=yes
set markPVSystems=yes
set markStorage=yes
set transmarkercode=5

plot circuit Power  max=1000 dots=n labels=y C1=$00FF0000  1phLinestyle=3  ! Max Thickness is at 1000 kW
plot circuit Losses max=10      dots=y labels=y C1=$00FF0000 1phLinestyle=3 ! losses per unit length

!------------------------------------------------------------------------------
!--------------------Voltage Plot Example--------------------------------------
!------------------------------------------------------------------------------
! These settings make a more interesting voltage plot since the voltages are generally OK for this case
Voltages above    1.02 will be BLUE
Voltages between 1.0 and 1.02 will be GREEN
Voltages below     1.0 will be RED
!These are the default colors for the voltage plot


Set normvminpu=1.02
Set emergvminpu=1.0
!plot circuit voltage dots=y labels=n


!plot daisy Power Max=2000 dots=n labels=n subs=y C1= $00C5AC23 ! $00FF0000
!!help
