! Annotated "Run" file for the IEEE 123 Bus Test Case
!

! This file contains two DSS scripts for executing the IEEE 123-bus test case.

! The first script lets the DSS compute the regulator taps, which are generally one off from the
! presently posted solution. The second script uses the tap values determined by Kersting. This is done by
! setting the taps on the transformers representing the regulators and then inhibiting the regulator control

! The circuit definition is controlled by a "master" file, which invokes other files. This is but one
! logical way to oganize your files. You are free to choose another scheme of your choosing.

! =================================================================
! 1st Script
! =================================================================


Compile (IEEE123Master.dss)

! 'Compile' differs from "redirect" in that it changes the default directory
! to the one in which the referenced file is located.
! 'Redirect' returns to the directory from which it was invoked.

! After compiling, the next series of script commands modify to the regulator control definitions to
! limit the maximum tap change to 1 per solution control iteration. In most cases, this will
! allow the standard DSS solution algorithm to better represent an actual control.
! Note the time delay is also chnaged. This forces the regulator at the head of the feeder to move first.

RegControl.creg1a.maxtapchange=1  Delay=15  !Allow only one tap change per solution. This one moves first
RegControl.creg2a.maxtapchange=1  Delay=30  !Allow only one tap change per solution
RegControl.creg3a.maxtapchange=1  Delay=30  !Allow only one tap change per solution
RegControl.creg4a.maxtapchange=1  Delay=30  !Allow only one tap change per solution
RegControl.creg3c.maxtapchange=1  Delay=30  !Allow only one tap change per solution
RegControl.creg4b.maxtapchange=1  Delay=30  !Allow only one tap change per solution
RegControl.creg4c.maxtapchange=1  Delay=30  !Allow only one tap change per solution

! The default maximum control iterations is 10. With so many regulators each moving only one tap at a time,
! this is insufficient for the 123-bus test case, which will need 15 control iterations for the initial solution.
! Therefore, the 'MaxControlIter' option is set to 30 to be safe.

Set MaxControlIter=30

! Solve executes the solution for the present solution mode, which is "snapshot".

New EnergyMeter.Feeder Line.L115 terminal=1
New Monitor.Potencia_Feeder Line.L115 mode=1 terminal=1 ppolar=no
New Monitor.Storage Storage.Storage mode=3
New Monitor.Storagemode1 Storage.Storage mode=1 ppolar=n
!New Monitor.PVmode3 PVSystem.PV17 mode=3

set mode = daily stepsize=15m number=96
!set mode = daily stepsize=15m number=60 !Simulacao na Máxima demanda
SOLVE

Buscoords Buscoords.dat   ! load in bus coordinates

! Show some selected results

!Plot Profile
!plot profile phases=all
/*
Show Voltage LN Nodes     ! this shows the voltages by node, Line-to-Neutral voltage.
Show Currents Elements    ! this produces a report of the currents, element-by-element.
Show Powers kva Elements  ! This produces a report of the powers, in kVA, element-by-element
Show taps                 ! shows the present regulator taps
*/
!Redirect CircuitplottingScripts.DSS
